# LAMMPS input script for standardized atomistic simulations
# Created by emc_setup.pl v3.6.0, July 8, 2018 as part of EMC
# on Sun Jul  8 12:15:11 EDT 2018

# Variable definitions

variable	project		index	"field"	# project name
variable	source		index	.	# data directory
variable	params		index	.	# parameter directory
variable	temperature	index	1		# system temperature
variable	tdamp		index	100		# temperature damping
variable	dielectric	index	1		# medium dielectric
variable	kappa		index	4		# electrostatics kappa
variable	cutoff		index	2.5		# standard cutoff
variable	charge_cutoff	index	2.5		# charge cutoff
variable	precision	index	0.001		# kspace precision
variable	lseed		index	723853		# langevin seed
variable	vseed		index	1486234		# velocity init seed
variable	tequil		index	1000		# equilibration time
variable	trun		index	10000000	# run time
variable	frestart	index	0		# 0: equil, 1: restart
variable	dtrestart	index	100000		# delta restart time
variable	dtdump		index	100000		# delta dump time
variable	dtthermo	index	1000		# delta thermo time
variable	timestep	index	0.005		# integration time step
variable	tfreq		index	10		# profile sampling freq
variable	nsample		index	1000		# profile conf sampling
variable	dtime		equal	${tfreq}*${nsample}	# profile dtime
variable	restart		index	${params}/${project}.restart

if "${frestart} != 0" then &
"variable	data		index	${restart}" &
else &
"variable	data		index	${params}/${project}.data" &

# LAMMPS atomistic input script

echo		screen
units		lj
atom_style	molecular

# Interaction potential definition

pair_style	lj/cut ${cutoff}
bond_style	harmonic
special_bonds	lj/coul 0 0 0
if "${frestart} != 0" then "read_restart ${data}" else "read_data ${data}"
include		${params}/${project}.params

# Integration conditions (check)

timestep	${timestep}
fix		mom all momentum 100 linear 1 1 1 angular

# Equilibration

thermo		${dtthermo}
if "${frestart} != 0" then "jump SELF simulate"
velocity	all create ${temperature} ${vseed} &
		dist gaussian rot yes mom yes sum yes
fix		temp all langevin ${temperature} ${temperature} ${tdamp} &
		${lseed}
fix		int all nve/limit 0.1
run		${tequil}
unfix		temp
unfix		int
write_restart	${project}.restart2

# Simulation

label		simulate

# Integrator

fix		temp all langevin ${temperature} ${temperature} ${tdamp} &
		${lseed}
fix		int all nve

# System sampling: pressure

fix		sample_press all ave/time ${tfreq} ${nsample} ${dtime} &
		c_thermo_temp &
		c_thermo_press[1] c_thermo_press[2] c_thermo_press[3] &
		c_thermo_press[4] c_thermo_press[5] c_thermo_press[6] &
		file ${project}.pressure

# Run conditions

restart		${dtrestart} ${project}.restart1 ${project}.restart2
dump		1 all custom ${dtdump} ${project}.dump id type x y z
run		${trun}
